<neuroml xmlns="http://www.neuroml.org/schema/neuroml2"  xmlns:xs="http://www.w3.org/2001/XMLSchema" xmlns:xsi="http://www.w3.org/2001/XMLSchema-instance" xsi:schemaLocation="http://www.neuroml.org/schema/neuroml2 https://raw.github.com/NeuroML/NeuroML2/development/Schemas/NeuroML2/NeuroML_v2.1.xsd" id="C32B_scaled_exp_resample_5">
    <include href="../channels/na_s.channel.nml"/>
    <include href="../channels/kdr.channel.nml"/>
    <include href="../channels/k.channel.nml"/>
    <include href="../channels/cal.channel.nml"/>
    <include href="../channels/BK.channel.nml"/>
    <include href="../channels/cah.channel.nml"/>
    <include href="../channels/kca.channel.nml"/>
    <include href="../channels/h.channel.nml"/>
    <include href="../channels/ca.nml"/>
    <include href="../channels/cacc.channel.nml"/>
    <include href="../channels/na_a.channel.nml"/>
    <include href="../channels/leak.channel.nml"/>
    <cell id="C32B">
        <notes>Cell morphology generated by neuroConstruct from file: C32B_scaled_exp_resample_5.swc
TREES toolbox tree - C32B_scaled_exp_resample_5
written by an automatic procedure "swc_tree" part of the TREES package
in MATLAB
copyright 2009 Hermann Cuntz
inode R X Y Z D/2 idpar</notes>
        <morphology id="morphology_C32B_scaled_exp_resample_5">
            <segment id="0" name="Comp_1">
                <proximal x="3.493050e+01" y="2.675178e+01" z="2.839838e+01" diameter="11.44"/>
                <distal x="3.502928e+01" y="2.762393e+01" z="3.312407e+01" diameter="11.74272"/>
            </segment>
            <segment id="1" name="Comp_3">
                <parent segment="0"/>
                <distal x="3.452605e+01" y="2.784924e+01" z="2.375052e+01" diameter="9.43272"/>
            </segment>
            <segment id="2" name="Comp_4">
                <parent segment="0" fractionAlong="0.0"/>
                <proximal x="3.493050e+01" y="2.675178e+01" z="2.839838e+01" diameter="11.44"/>
                <distal x="3.139762e+01" y="2.996134e+01" z="2.858331e+01" diameter="8.00272"/>
            </segment>
            <segment id="3" name="Comp_5">
                <parent segment="0" fractionAlong="0.0"/>
                <proximal x="3.493050e+01" y="2.675178e+01" z="2.839838e+01" diameter="11.44"/>
                <distal x="3.640640e+01" y="3.065471e+01" z="2.970583e+01" diameter="5.995"/>
            </segment>
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            <segmentGroup neuroLexId="sao864921383" id="Soma">
                <member segment="0"/>
                <member segment="1"/>
                <member segment="5"/>
                <member segment="9"/>
            </segmentGroup>
            <segmentGroup neuroLexId="sao864921383" id="ExtraSomaSec_Comp_4">
                <member segment="2"/>
                <member segment="6"/>
            </segmentGroup>
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            <segmentGroup neuroLexId="GO:0043025" id="soma_group">
                <include segmentGroup="Soma"/>
            </segmentGroup>
            <segmentGroup neuroLexId="GO:0030425" id="axon_group">
                <include segmentGroup="ExtraSomaSec_Comp_4"/>
                <include segmentGroup="ExtraSomaSec_Comp_5"/>
                <include segmentGroup="ExtraSomaSec_Comp_6"/>
            </segmentGroup>
            <segmentGroup id="ExtraSomaSegments">
                <include segmentGroup="ExtraSomaSec_Comp_4"/>
                <include segmentGroup="ExtraSomaSec_Comp_5"/>
                <include segmentGroup="ExtraSomaSec_Comp_6"/>
            </segmentGroup>
            <segmentGroup id="Colour_DarkGrey">
                <include segmentGroup="Sec_Comp_12"/>
                <include segmentGroup="Sec_Comp_13"/>
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            </segmentGroup>
            <segmentGroup neuroLexId="GO:0030424" id="dendrite_group">
                <include segmentGroup="Sec_Comp_12"/>
                <include segmentGroup="Sec_Comp_13"/>
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            </segmentGroup>
        </morphology>
        <biophysicalProperties id="biophys">
            <membraneProperties>
                <channelDensity id="na_s_soma" ionChannel="na_s" condDensity="30 mS_per_cm2" erev="55 mV" segmentGroup="soma_group" ion="na"/>
                <channelDensity id="kdr_soma" ionChannel="kdr" condDensity="30 mS_per_cm2" erev="-75 mV" segmentGroup="soma_group" ion="k"/>
                <channelDensity id="k_soma" ionChannel="k" condDensity="15 mS_per_cm2" erev="-75 mV" segmentGroup="soma_group" ion="k"/>
                <channelDensity id="cal_soma" ionChannel="cal" condDensity="80 mS_per_cm2" erev="120 mV" segmentGroup="soma_group" ion="ca"/>
                <channelDensity id="BK_soma" ionChannel="BK" condDensity="0 mS_per_cm2" erev="-88 mV" segmentGroup="soma_group" ion="k"/>
                <channelDensity id="cah_dend" ionChannel="cah" condDensity="10 mS_per_cm2" erev="120 mV" segmentGroup="dendrite_group" ion="ca"/>
                <channelDensity id="kca_dend" ionChannel="kca" condDensity="200 mS_per_cm2" erev="-75 mV" segmentGroup="dendrite_group" ion="k"/>
                <channelDensity id="h_dend" ionChannel="h" condDensity="25 mS_per_cm2" erev="-43 mV" segmentGroup="dendrite_group" ion="h"/>
                <channelDensity id="cacc_dend" ionChannel="cacc" condDensity="0 mS_per_cm2" erev="-45 mV" segmentGroup="dendrite_group" ion="cl"/>
                <channelDensity id="na_axon" ionChannel="na_a" condDensity="200 mS_per_cm2" erev="55 mV" segmentGroup="axon_group" ion="na"/>
                <channelDensity id="k_axon" ionChannel="k" condDensity="200 mS_per_cm2" erev="-75 mV" segmentGroup="axon_group" ion="k"/>
                <channelDensity id="leak_all" ionChannel="leak" condDensity="1.3e-2 mS_per_cm2" erev="10 mV" ion="non_specific"/>
                <spikeThresh value="0 mV"/>
                <specificCapacitance value="1 uF_per_cm2"/>
                <initMembPotential value="-65.0 mV"/>
            </membraneProperties>
            <intracellularProperties>
                <species segmentGroup="dendrite_group" id="ca" concentrationModel="ca_conc" ion="ca" initialConcentration="3.7152 mM" initialExtConcentration="3.0mM"/>
                <resistivity value="100 ohm_cm" segmentGroup="soma_group"/>
                <resistivity value="100 ohm_cm" segmentGroup="dendrite_group"/>
                <resistivity value="100 ohm_cm" segmentGroup="axon_group"/>
            </intracellularProperties>
        </biophysicalProperties>
    </cell>
</neuroml>
